# Коэффициент поверхностного
# натяжения воды:
σ := 72.28*10^-3  # Н/м
g := 9.8  # м / с^2
# кг/м^3
H := [54; 64; 68; 73; 75]  # мм
# Плотности воды (жидкости)
# и воздуха (газа):
ρ1 := 1000
# - Полная высота
# газожидкострого
# слоя
h0 := [18; 123; 227; 333; 435; 539; 640]*10^-3
h0_6 := [18; 123; 227; 333; 435; 649]*10^-3
ρ2 := 1.25  # кг/м^3
# Расстояние от дырчатого листа до места отбора давления
# м | м | м
h2 := [47.5; 39; 30.5; 22; 14]*10^-3
h4 := [48; 40; 32; 24; 17]*10^-3
540 - 18 = 522
h0 := [3; 13.3; 23.8; 34.3; 45.2]*10^-3
h1 := [472; 380; 290; 205; 120; 40]*10^-3  # м  # м
м
h5 := [48; 41; 32.5; 25; 18]*10^-3
1000*472/522 = 904.215
h3 := [47.5; 39; 31; 23; 15.5]*10^-3
# Высота части слоя газожидскотного слоя
540 - 472 = 68
h_см1 := (545*10^-3 - h0_6) = [0.527; 0.422; 0.318; 0.212; 0.11; -0.104]
h_см3 := (680*10^-3 - h0) = [0.677; 0.6667; 0.6562; 0.6457; 0.6348]
h_см5 := (750*10^-3 - h0) = [0.747; 0.7367; 0.7262; 0.7157; 0.7048]
1000*40/68 = 588.235
h_см2 := (640*10^-3 - h0_6) = [0.622; 0.517; 0.413; 0.307; 0.205; -0.009]
h_см4 := (730*10^-3 - h0) = [0.727; 0.7167; 0.7062; 0.6957; 0.6848]
# Плотность смеси
ρ_см1 := ρ1*h1/h_см1 = [895.636; 900.474; 911.95; 966.981; 1090.91; -384.615]
ρ_см3 := ρ1*h3/h_см3 = [70.1625; 58.4971; 47.2417; 35.6203; 24.4171]
ρ_см5 := ρ1*h5/h_см5 = [64.257; 55.6536; 44.7535; 34.9308; 25.5392]
ρ_см2 := ρ1*h2/h_см2  # error: Размерности массива не совпадают.
ρ_см4 := ρ1*h4/h_см4 = [66.0248; 55.8114; 45.3129; 34.4976; 24.8248]
# Истинный объем паросодержания
φ1 := (ρ_см1 - ρ1)/(ρ1 - ρ2) = [-0.104495; -0.0996506; -0.0881605; -0.0330602; 0.0910229; -1.38635]
φ3 := (ρ_см3 - ρ1)/(ρ1 - ρ2) = [-0.931001; -0.942681; -0.953951; -0.965587; -0.976804]
φ5 := (ρ_см5 - ρ1)/(ρ1 - ρ2) = [-0.936914; -0.945528; -0.956442; -0.966277; -0.97568]
φ2 := (ρ_см2 - ρ1)/(ρ1 - ρ2)  # error: Эта переменная не определена.
φ4 := (ρ_см4 - ρ1)/(ρ1 - ρ2) = [-0.935144; -0.94537; -0.955882; -0.966711; -0.976396]
# Эффективная скорость относительного движения фаз
ΔW := 2*(ρ1/ρ2)^(1/5)*(1 - ρ2/ρ1)^5*nthroot(σ*g*(ρ1 - ρ2)/ρ1^2, 4) = 1.23412
# Площадь дырчатого листа:
S := 65*3.14*(1.4*10^-3)^2/4 = 0.000100009  # м^2
# Приведенная скорость газа
# В | 10^4 | м*м*м/с
G := [1.31; 1.33; 1.36; 1.39; 1.42]
V2 := [1.2*10^4; 1.25*10^4; 1.3*10^4; 1.8*10^4; 1.9*10^4]
W0 := V2/(S*10^4) = [11998.9; 12498.9; 12998.8; 17998.4; 18998.3]  # м/с
k := 0.2
W0_cr := k*nthroot(σ*g*(ρ1 - ρ2)/ρ2^2, 4) = 0.922572  # м/с
φ := 1/(1 + ΔW/W0_cr) = 0.427772
φ := [0.93; 0.313; 0.157; 0.727; 0.611]
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