# Высота щелевого канала:
δ := 0.003  # м
# Перепад давлений:
Δp := 1000  # Па
# Длина канала:
Δx := 1  # м
# Динамическая вязкость
# верхней жидкости:
μ1 := 1.55*10^-1  # Па*с
# Динамическая вязкость
# нижней жидкости:
μ2 := 3.5*10^-3  # Па*с
# Объёмный расход
# нижней жидкости:
V2 := 5.3*10^-4 = 0.00053  # м^3/c
# Определим высоту нижнего потока:
(1/μ2*a2^3/6*Δp/Δx + a2^2/2*((1/μ1*a2^2/2*(-Δp/Δx) - 1/μ1*(-Δp/Δx)*δ^2/2 - 1/μ2*a2^2/2*(-Δp/Δx))/(a2 + μ2/μ1*δ - μ2/μ1*a2))) == V2 solve, a2 → [
    -6.91697812033e-5;
    0.00163403136163;
    -0.00079629217635 - 0.00144771230015i;
    -0.00079629217635 + 0.00144771230015i
]
# Высота нижнего потока:
a2 := 0.00163  # м
# Высота верхнего потока:
a := δ - a2 = 0.00137  # м
Коэффиценты
c3 := (1/μ1*a2^2/2*(-Δp/Δx) - 1/μ1*(-Δp/Δx)*δ^2/2 - 1/μ2*a2^2/2*(-Δp/Δx))/(a2 + μ2/μ1*δ - μ2/μ1*a2) = 240.839
c1 := c3*μ2/μ1 = 5.43831
c2 := -1/μ1*(-Δp/Δx)*δ^2/2 - c1*δ = 0.0127173
c4 := 0
# Определим объёмный расход верхней жидкости:
(1/μ1*(-Δp/Δx)*(δ^3 - a2^3)/6 + c1*((δ^2 - a2^2)/2) + c2*(δ - a2)) == V1 solve, V1 → 1.0295070934e-5
# Профили скоростей потоков:
u1(y) := 1/μ1*(-Δp/Δx)*y^2/2 + c1*y + c2
u2(y) := 1/μ2*(-Δp/Δx)*y^2/2 + c3*y + c4
v1(3.323*10^-3) =  # error: This variable is undefined.
(d/dy(u1(y))) == 0 solve → 0.000842938006176 = 0.000842938
v2(3.323*10^-3) =  # error
(d/dy(u2(y))) == 0 solve → 0.000842938006176 = 0.000842938
u1(1.79*10^-3) = 0.0121161
u2(1.79*10^-3) = -0.026626
u1(a2) = 0.0130111
5
u2(a2) = 0.0130111
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